// SBML level 2 version 4

model model_SPR()

  // Compartments:
  compartment unnamed = 1;

  // Species:
  species $E in unnamed = 0;
  species $R in unnamed;
  species ER in unnamed = 0;
  species $O in unnamed = 0;
  species EO in unnamed = 0;
  species OR in unnamed = 0;
  species $pR in unnamed = 0;
  species EpR in unnamed = 0;
  species OpR in unnamed = 0;
  species $pE in unnamed = 0;
  species pEO in unnamed = 0;
  species pER in unnamed = 0;
  species pEpR in unnamed = 0;
  species EO_OR in unnamed = 0;
  species EO_ER in unnamed = 0;
  species ER_OR in unnamed = 0;
  species EO_OpR in unnamed = 0;
  species EO_EpR in unnamed = 0;
  species EpR_OpR in unnamed = 0;
  species pEO_OR in unnamed = 0;
  species pEO_pER in unnamed = 0;
  species pER_OR in unnamed = 0;
  species pEO_OpR in unnamed = 0;
  species pEO_pEpR in unnamed = 0;
  species pEpR_OpR in unnamed = 0;
  species EO_ER_OR in unnamed = 0;
  species EO_EpR_OpR in unnamed = 0;
  species pEO_pER_OR in unnamed = 0;
  species pEO_pEpR_OpR in unnamed = 0;
  species Otot in unnamed;
  species Rtot in unnamed = 0;
  species Etot in unnamed;
  species pRtot in unnamed;
  species pEtot in unnamed;
  species Rcomp in unnamed;

  // Parameters:
  kon_ER = 1;
  kon_ER_factor = 1;
  kon_OR = 1;
  kon_OR_factor = 1;
  kon_EO = 1;
  kon_EO_factor = 1;
  KD_EO = 1;
  KD_ER = 1;
  KD_OR = 1;
  KD_OpR = 1;
  KD_pEO = 1;
  pE_factor = 100;
  a = 1;
  d = 1;
  E_weight = 6.3;
  O_weight = 1;
  KD_EpR_factor = 5;

  // Assignment rules:
  koff_EO := KD_EO*kon_EO;
  koff_EO_d := KD_EO*kon_EO*d;
  KD_EpR := KD_ER*KD_EpR_factor;
  koff_ER := KD_ER*kon_ER;
  koff_ER_d := KD_ER*kon_ER*d;
  koff_EpR := KD_EpR*kon_ER;
  koff_EpR_d := KD_EpR*kon_ER*d;
  koff_OR := KD_OR*kon_OR;
  koff_OR_d := KD_OR*kon_OR*d;
  koff_OpR := KD_OpR*kon_OR;
  koff_OpR_d := KD_OpR*kon_OR*d;
  koff_pEO := KD_pEO*kon_EO;
  koff_pEO_d := KD_pEO*kon_EO*d;
  Otot := O + EO + pEO + OR + OpR + EO_OR + pEO_OR + pEO_OpR + EO_OpR + EO_ER + pEO_pER + EO_EpR + pEO_pEpR + ER_OR + pER_OR + EpR_OpR + pEpR_OpR + EO_ER_OR + EO_EpR_OpR + pEO_pER_OR + pEO_pEpR_OpR;
  R := Rtot - (pR + EpR + pEpR + ER + pER + OR + OpR + EO_OR + pEO_OR + pEO_OpR + EO_OpR + EO_ER + pEO_pER + EO_EpR + pEO_pEpR + ER_OR + pER_OR + EpR_OpR + pEpR_OpR + EO_ER_OR + EO_EpR_OpR + pEO_pER_OR + pEO_pEpR_OpR);
  Rcomp := E_weight*(pER + ER) + O_weight*OR + (O_weight + E_weight)*(pEO_OR + EO_OR + pEO_pER + EO_ER + pER_OR + ER_OR + pEO_pER_OR + EO_ER_OR);
  pRtot := pR + EpR + pEpR + OpR + pEO_OpR + EO_OpR + EO_EpR + pEO_pEpR + EpR_OpR + pEpR_OpR + EO_EpR_OpR + pEO_pEpR_OpR;
  pEtot := pE + pEpR + pER + pEO + pEO_OR + pEO_OpR + pEO_pER + pEO_pEpR + pER_OR + pEpR_OpR + pEO_pER_OR + pEO_pEpR_OpR;
  Etot := E + pE + EpR + pEpR + ER + pER + EO + pEO + EO_OR + pEO_OR + pEO_OpR + EO_OpR + EO_ER + pEO_pER + EO_EpR + pEO_pEpR + ER_OR + pER_OR + EpR_OpR + pEpR_OpR + EO_ER_OR + EO_EpR_OpR + pEO_pER_OR + pEO_pEpR_OpR;
  kon_EO_a := a*kon_EO;
  kon_OR_a := a*kon_OR;
  kon_ER_a := a*kon_ER;

  // Reactions:
  vER: $E + $R -> ER; kon_ER_factor*kon_ER*E*R - koff_ER*ER;
  vEO: $E + $O -> EO; kon_EO_factor*kon_EO*E*O - koff_EO*EO;
  vOR: $R + $O -> OR; kon_OR_factor*kon_OR*R*O - koff_OR*OR;
  vEpR: $E + $pR -> EpR; kon_ER_factor*kon_ER*E*pR - koff_EpR*EpR;
  vOpR: $O + $pR -> OpR; kon_OR_factor*kon_OR*O*pR - koff_OpR*OpR;
  vpEO: $pE + $O -> pEO; kon_EO_factor*kon_EO*pE*O - koff_pEO*pEO;
  vpER: $pE + $R -> pER; kon_ER_factor*kon_ER*pE*R - koff_ER*pER;
  vpEpR: $pR + $pE -> pEpR; kon_ER_factor*kon_ER*pR*pE - koff_EpR*pEpR;
  vEO_OR_OR: OR + $E -> EO_OR; kon_EO_factor*kon_EO*OR*E - koff_EO*EO_OR;
  vEO_OR_EO: EO + $R -> EO_OR; kon_OR_factor*kon_OR*EO*R - koff_OR*EO_OR;
  vEO_ER_EO: EO + $R -> EO_ER; kon_ER_factor*kon_ER*EO*R - koff_ER*EO_ER;
  vEO_ER_ER: ER + $O -> EO_ER; kon_EO_factor*kon_EO*ER*O - koff_EO*EO_ER;
  vER_OR_OR: OR + $E -> ER_OR; kon_ER_factor*kon_ER*OR*E - koff_ER*ER_OR;
  vER_OR_ER: ER + $O -> ER_OR; kon_OR_factor*kon_OR*ER*O - koff_OR*ER_OR;
  vEO_OpR_OpR: OpR + $E -> EO_OpR; kon_EO_factor*kon_EO*OpR*E - koff_EO*EO_OpR;
  vEO_OpR_EO: EO + $pR -> EO_OpR; kon_OR_factor*kon_OR*EO*pR - koff_OpR*EO_OpR;
  vEO_EpR_EO: EO + $pR -> EO_EpR; kon_ER_factor*kon_ER*EO*pR - koff_EpR*EO_EpR;
  vEO_EpR_EpR: EpR + $O -> EO_EpR; kon_EO_factor*kon_EO*EpR*O - koff_EO*EO_EpR;
  vEpR_OpR_OpR: OpR + $E -> EpR_OpR; kon_ER_factor*kon_ER*OpR*E - koff_EpR*EpR_OpR;
  vEpR_OpR_EpR: EpR + $O -> EpR_OpR; kon_OR_factor*kon_OR*EpR*O - koff_OpR*EpR_OpR;
  vpEO_OR_OR: OR + $pE -> pEO_OR; kon_EO_factor*kon_EO*OR*pE - koff_pEO*pEO_OR;
  vpEO_OR_pEO: pEO + $R -> pEO_OR; kon_OR_factor*kon_OR*pEO*R - koff_OR*pEO_OR;
  pEO_pER_pER: pER + $O -> pEO_pER; kon_EO_factor*kon_EO*pER*O - koff_pEO*pEO_pER;
  vpEO_pER_pEO: pEO + $R -> pEO_pER; kon_ER_factor*kon_ER*pEO*R - koff_ER*pEO_pER;
  vpER_OR_OR: OR + $pE -> pER_OR; kon_ER_factor*kon_ER*OR*pE - koff_ER*pER_OR;
  vpER_OR_pER: pER + $O -> pER_OR; kon_OR_factor*kon_OR*pER*O - koff_OR*pER_OR;
  vpEO_OpR_OpR: OpR + $pE -> pEO_OpR; kon_EO_factor*kon_EO*OpR*pE - koff_pEO*pEO_OpR;
  vpEO_OpR_pEO: pEO + $pR -> pEO_OpR; kon_OR_factor*kon_OR*pEO*pR - koff_OpR*pEO_OpR;
  vpEO_pEpR_pEO: $pR + pEO -> pEO_pEpR; kon_ER_factor*kon_ER*pR*pEO - koff_EpR*pEO_pEpR;
  vpEO_pEpR_pEpR: pEpR + $O -> pEO_pEpR; kon_EO_factor*kon_EO*pEpR*O - koff_pEO*pEO_pEpR;
  vpEpR_OpR_OpR: OpR + $pE -> pEpR_OpR; kon_ER_factor*kon_ER*OpR*pE - koff_EpR*pEpR_OpR;
  vpEpR_OpR_pEpR: pEpR + $O -> pEpR_OpR; kon_OR_factor*kon_OR*pEpR*O - koff_OpR*pEpR_OpR;
  vEO_ER_OR_EROR: ER_OR -> EO_ER_OR; kon_EO_a*ER_OR - koff_EO_d*EO_ER_OR;
  vEO_ER_OR_EOER: EO_ER -> EO_ER_OR; kon_OR_a*EO_ER - koff_OR_d*EO_ER_OR;
  vEO_ER_OR_EOOR: EO_OR -> EO_ER_OR; kon_ER_a*EO_OR - koff_ER_d*EO_ER_OR;
  vEO_ERo_OpR_EOOpR: EO_OpR -> EO_EpR_OpR; kon_ER_a*EO_OpR - koff_EpR_d*EO_EpR_OpR;
  vEO_EpR_OpR_EOEpR: EO_EpR -> EO_EpR_OpR; kon_OR_a*EO_EpR - koff_OpR_d*EO_EpR_OpR;
  vEO_EpR_OpR_EpROpR: EpR_OpR -> EO_EpR_OpR; kon_EO_a*EpR_OpR - koff_EO_d*EO_EpR_OpR;
  vpEO_pER_OR_pEOOR: pEO_OR -> pEO_pER_OR; kon_ER_a*pEO_OR - koff_ER_d*pEO_pER_OR;
  vpEO_pER_OR_pEOpER: pEO_pER -> pEO_pER_OR; kon_OR_a*pEO_pER - koff_OR_d*pEO_pER_OR;
  vpEO_pER_OR_pEROR: pER_OR -> pEO_pER_OR; kon_EO_a*pER_OR - koff_pEO_d*pEO_pER_OR;
  vpEO_pEpR_OpR_pEOOpR: pEO_OpR -> pEO_pEpR_OpR; kon_ER_a*pEO_OpR - koff_EpR_d*pEO_pEpR_OpR;
  vpEO_pEpR_OpR_pEOpEpR: pEO_pEpR -> pEO_pEpR_OpR; kon_OR_a*pEO_pEpR - koff_OpR_d*pEO_pEpR_OpR;
  vpEO_pEpR_OpR_pEpROpR: pEpR_OpR -> pEO_pEpR_OpR; kon_EO_a*pEpR_OpR - koff_pEO_d*pEO_pEpR_OpR;
end
