// SBML level 2 version 4

model model_invitro_incell()

  // Compartments:
  compartment unnamed = 1;

  // Species:
  species $E in unnamed;
  species $R in unnamed;
  species $O in unnamed;
  species ER in unnamed = 0;
  species EO in unnamed = 0;
  species OR in unnamed = 0;
  species pR in unnamed = 0;
  species EpR in unnamed = 0;
  species OpR in unnamed = 0;
  species pE in unnamed = 0;
  species pEO in unnamed = 0;
  species pER in unnamed = 0;
  species pEpR in unnamed = 0;
  species EO_OR in unnamed = 0;
  species EO_ER in unnamed = 0;
  species ER_OR in unnamed = 0;
  species EO_OpR in unnamed = 0;
  species EO_EpR in unnamed = 0;
  species EpR_OpR in unnamed = 0;
  species pEO_OR in unnamed = 0;
  species pEO_pER in unnamed = 0;
  species pER_OR in unnamed = 0;
  species pEO_OpR in unnamed = 0;
  species pEO_pEpR in unnamed = 0;
  species pEpR_OpR in unnamed = 0;
  species EO_ER_OR in unnamed = 0;
  species EO_EpR_OpR in unnamed = 0;
  species pEO_pER_OR in unnamed = 0;
  species pEO_pEpR_OpR in unnamed = 0;
  species $pK in unnamed;
  species K in unnamed = 0;
  species EpK in unnamed = 0;
  species EK in unnamed = 0;
  species pEpK in unnamed = 0;
  species pEK in unnamed = 0;
  species pEP in unnamed = 0;
  species EP in unnamed = 0;
  species $P in unnamed;
  species $P2 in unnamed;
  species pRP2 in unnamed = 0;
  species P2tot in unnamed = 1/unnamed;
  species Ptot in unnamed = 1/unnamed;
  species Ktot in unnamed = 1/unnamed;
  species Otot in unnamed = 1/unnamed;
  species Rtot in unnamed = 2/unnamed;
  species Etot in unnamed = 0.7/unnamed;
  species pRtot in unnamed;
  species pEtot in unnamed;
  species RP2 in unnamed = 0;
  species ERP2 in unnamed = 0;
  species pERP2 in unnamed = 0;
  species EO_ERP2 in unnamed = 0;
  species pEO_pERP2 in unnamed = 0;
  species EpRP2 in unnamed = 0;
  species pEpRP2 in unnamed = 0;
  species EO_EpRP2 in unnamed = 0;
  species pEO_pEpRP2 in unnamed = 0;
  species pEO_ER in unnamed = 0;
  species EPO in unnamed = 0;
  species pEPO in unnamed = 0;
  species EPO_OR in unnamed = 0;
  species pEPO_OR in unnamed = 0;
  species EPO_OpR in unnamed = 0;
  species pEPO_OpR in unnamed = 0;
  species EpKO in unnamed = 0;
  species pEpKO in unnamed = 0;
  species EpKO_OR in unnamed = 0;
  species pEpKO_OR in unnamed = 0;
  species EpKO_OpR in unnamed = 0;
  species pEpKO_OpR in unnamed = 0;
  species EKO in unnamed = 0;
  species pEKO in unnamed = 0;
  species EKO_OR in unnamed = 0;
  species pEKO_OR in unnamed = 0;
  species EKO_OpR in unnamed = 0;
  species pEKO_OpR in unnamed = 0;
  species pRSUBC in unnamed = 0;
  species EpRSUBC in unnamed = 0;
  species pEpRSUBC in unnamed = 0;
  species EO_EpRSUBC in unnamed = 0;
  species pEO_pEpRSUBC in unnamed = 0;
  species $SUBC in unnamed;
  species pSUBC in unnamed = 0;
  species SUBCtot in unnamed = 0;
  species pRSUBF in unnamed = 0;
  species EpRSUBF in unnamed = 0;
  species pEpRSUBF in unnamed = 0;
  species EO_EpRSUBF in unnamed = 0;
  species OpRSUBF in unnamed = 0;
  species EpR_OpRSUBF in unnamed = 0;
  species pEpR_OpRSUBF in unnamed = 0;
  species pEO_pEpRSUBF in unnamed = 0;
  species EO_OpRSUBF in unnamed = 0;
  species pEO_OpRSUBF in unnamed = 0;
  species pRP2SUBF in unnamed = 0;
  species EpRP2SUBF in unnamed = 0;
  species pEpRP2SUBF in unnamed = 0;
  species EO_EpRP2SUBF in unnamed = 0;
  species pEO_pEpRP2SUBF in unnamed = 0;
  species EPO_OpRSUBF in unnamed = 0;
  species pEPO_OpRSUBF in unnamed = 0;
  species EpKO_OpRSUBF in unnamed = 0;
  species pEpKO_OpRSUBF in unnamed = 0;
  species EKO_OpRSUBF in unnamed = 0;
  species pEKO_OpRSUBF in unnamed = 0;
  species pRSUBCSUBF in unnamed = 0;
  species EpRSUBCSUBF in unnamed = 0;
  species pEpRSUBCSUBF in unnamed = 0;
  species EO_EpRSUBCSUBF in unnamed = 0;
  species pEO_pEpRSUBCSUBF in unnamed = 0;
  species $SUBF in unnamed;
  species pSUBF in unnamed = 0;
  species SUBFtot in unnamed = 0;
  species pEO_pEpR_OpRSUBF in unnamed = 0;
  species EO_EpR_OpRSUBF in unnamed = 0;

  // Parameters:
  kon_ER = 1;
  kon_ER_factor = 1;
  kon_OR = 1;
  kon_OR_factor = 1;
  kon_EO = 1;
  kon_EO_factor = 1;
  KD_ER = 1;
  KD_OR = 1;
  KD_OpR = 1;
  KD_pEO = 1;
  KD_EK = 1;
  KD_EP = 1;
  KD_RP2 = 1;
  pE_factor = 100;
  kp_R = 1;
  kp_R_on = 1;
  kon_EK = 1;
  kp_E = 1;
  kp_E_on = 1;
  kon_EP = 1;
  kdp_E = 1;
  kdp_E_on = 1;
  kon_RP2 = 1;
  kdp_R = 1;
  kp_K_bg = 1;
  kp_K_egf = 1;
  kp_K_on = 1;
  kdp_K = 1;
  a = 1;
  d = 1;
  Rtot_factor = 1;
  Otot_factor = 1;
  KD_EpR_factor = 5;
  koff_pRSUB = 1;
  kon_pRSUB = 1;
  kp_SUB = 1;
  kdp_SUB = 1;

  // Assignment rules:
  KD_EO := KD_pEO*pE_factor;
  koff_EO := KD_EO*kon_EO;
  koff_EO_d := KD_EO*kon_EO*d;
  KD_EpR := KD_ER*KD_EpR_factor;
  koff_ER := KD_ER*kon_ER;
  koff_ER_d := KD_ER*kon_ER*d;
  koff_EpR := KD_EpR*kon_ER;
  koff_EpR_d := KD_EpR*kon_ER*d;
  koff_OR := KD_OR*kon_OR;
  koff_OR_d := KD_OR*kon_OR*d;
  koff_OpR := KD_OpR*kon_OR;
  koff_OpR_d := KD_OpR*kon_OR*d;
  koff_pEO := KD_pEO*kon_EO;
  koff_pEO_d := KD_pEO*kon_EO*d;
  koff_EK := KD_EK*kon_EK;
  koff_EP := KD_EP*kon_EP;
  koff_RP2 := KD_RP2*kon_RP2;
  P := Ptot - (EP + pEP + EPO_OR + EPO + pEPO + pEPO_OpR + EPO_OpR + pEPO_OR + pEPO_OpRSUBF + EPO_OpRSUBF);
  P2 := P2tot - (pRP2 + pERP2 + EO_ERP2 + pEO_pEpRP2 + EpRP2 + RP2 + EO_EpRP2 + ERP2 + pEpRP2 + pEO_pERP2 + pEpRP2SUBF + pRP2SUBF + EO_EpRP2SUBF + EpRP2SUBF + pEO_pEpRP2SUBF);
  pK := Ktot - (EpK + pEpK + K + EK + pEK + EKO + EKO_OpR + EpKO_OR + pEpKO + EpKO + pEpKO_OpR + pEKO_OR + pEpKO_OR + EKO_OR + EpKO_OpR + pEKO_OpR + pEKO + pEpKO_OpRSUBF + EpKO_OpRSUBF);
  O := Otot*Otot_factor - (EO + pEO + OR + OpR + EO_OR + pEO_OR + pEO_OpR + EO_OpR + EO_ER + pEO_pER + EO_EpR + pEO_pEpR + ER_OR + pER_OR + EpR_OpR + pEpR_OpR + EO_ER_OR + EO_EpR_OpR + pEO_pER_OR + pEO_pEpR_OpR + EO_ERP2 + pEO_pEpRP2 + EO_EpRP2 + pEO_pERP2 + EPO_OR + EPO + pEPO + pEPO_OpR + EPO_OpR + pEPO_OR + EKO + EKO_OpR + EpKO_OR + pEpKO + EpKO + pEpKO_OpR + pEKO_OR + pEpKO_OR + EKO_OR + EpKO_OpR + pEKO_OpR + pEKO + pEO_pEpRSUBC + EO_EpRSUBC + pEO_pEpRSUBCSUBF + OpRSUBF + pEO_pEpRSUBF + EO_OpRSUBF + pEpKO_OpRSUBF + pEPO_OpRSUBF + EpKO_OpRSUBF + EpR_OpRSUBF + pEO_pEpR_OpRSUBF + EO_EpRSUBCSUBF + pEKO_OpRSUBF + EO_EpRP2SUBF + EKO_OpRSUBF + EPO_OpRSUBF + EO_EpRSUBF + EO_EpR_OpRSUBF + pEpR_OpRSUBF + pEO_OpRSUBF + pEO_pEpRP2SUBF);
  R := Rtot*Rtot_factor - (pR + EpR + pEpR + ER + pER + OR + OpR + EO_OR + pEO_OR + pEO_OpR + EO_OpR + EO_ER + pEO_pER + EO_EpR + pEO_pEpR + ER_OR + pER_OR + EpR_OpR + pEpR_OpR + EO_ER_OR + EO_EpR_OpR + pEO_pER_OR + pEO_pEpR_OpR + pRP2 + pERP2 + EO_ERP2 + pEO_pEpRP2 + EpRP2 + RP2 + EO_EpRP2 + ERP2 + pEpRP2 + pEO_pERP2 + EPO_OR + pEPO_OpR + EPO_OpR + pEPO_OR + EKO_OpR + EpKO_OR + pEpKO_OpR + pEKO_OR + pEpKO_OR + EKO_OR + EpKO_OpR + pEKO_OpR + pRSUBC + pEO_pEpRSUBC + EO_EpRSUBC + pEpRSUBC + EpRSUBC + pEO_pEpRSUBCSUBF + OpRSUBF + pEO_pEpRSUBF + EO_OpRSUBF + pEpKO_OpRSUBF + EpRSUBCSUBF + pEPO_OpRSUBF + EpKO_OpRSUBF + pEpRSUBCSUBF + pRSUBF + EpR_OpRSUBF + pEpRP2SUBF + pEO_pEpR_OpRSUBF + EO_EpRSUBCSUBF + EpRSUBF + pRP2SUBF + pEKO_OpRSUBF + EO_EpRP2SUBF + pEpRSUBF + pRSUBCSUBF + EKO_OpRSUBF + EPO_OpRSUBF + EO_EpRSUBF + EO_EpR_OpRSUBF + pEpR_OpRSUBF + EpRP2SUBF + pEO_OpRSUBF + pEO_pEpRP2SUBF);
  pRtot := pR + EpR + pEpR + OpR + pEO_OpR + EO_OpR + EO_EpR + pEO_pEpR + EpR_OpR + pEpR_OpR + EO_EpR_OpR + pEO_pEpR_OpR + pRP2 + pEO_pEpRP2 + EpRP2 + EO_EpRP2 + pEpRP2 + pEPO_OpR + EPO_OpR + EKO_OpR + pEpKO_OpR + EpKO_OpR + pEKO_OpR + pRSUBC + pEO_pEpRSUBC + EO_EpRSUBC + pEpRSUBC + EpRSUBC + pEO_pEpRSUBCSUBF + OpRSUBF + pEO_pEpRSUBF + EO_OpRSUBF + pEpKO_OpRSUBF + EpRSUBCSUBF + pEPO_OpRSUBF + EpKO_OpRSUBF + pEpRSUBCSUBF + pRSUBF + EpR_OpRSUBF + pEpRP2SUBF + pEO_pEpR_OpRSUBF + EO_EpRSUBCSUBF + EpRSUBF + pRP2SUBF + pEKO_OpRSUBF + EO_EpRP2SUBF + pEpRSUBF + pRSUBCSUBF + EKO_OpRSUBF + EPO_OpRSUBF + EO_EpRSUBF + EO_EpR_OpRSUBF + pEpR_OpRSUBF + EpRP2SUBF + pEO_OpRSUBF + pEO_pEpRP2SUBF;
  pEtot := pE + pEpR + pER + pEO + pEO_OR + pEO_OpR + pEO_pER + pEO_pEpR + pER_OR + pEpR_OpR + pEO_pER_OR + pEO_pEpR_OpR + pEP + pEpK + pEK + pERP2 + pEO_pEpRP2 + pEpRP2 + pEO_pERP2 + pEPO + pEPO_OpR + pEPO_OR + pEpKO + pEpKO_OpR + pEKO_OR + pEpKO_OR + pEKO_OpR + pEKO + pEO_pEpRSUBC + pEpRSUBC + pEO_pEpRSUBCSUBF + pEO_pEpRSUBF + pEpKO_OpRSUBF + pEPO_OpRSUBF + pEpRSUBCSUBF + pEpRP2SUBF + pEO_pEpR_OpRSUBF + pEKO_OpRSUBF + pEpRSUBF + pEpR_OpRSUBF + pEO_OpRSUBF + pEO_pEpRP2SUBF;
  E := Etot - (pE + EpR + pEpR + ER + pER + EO + pEO + EO_OR + pEO_OR + pEO_OpR + EO_OpR + EO_ER + pEO_pER + EO_EpR + pEO_pEpR + ER_OR + pER_OR + EpR_OpR + pEpR_OpR + EO_ER_OR + EO_EpR_OpR + pEO_pER_OR + pEO_pEpR_OpR + EpK + pEpK + pEP + EP + EK + pEK + pERP2 + EO_ERP2 + pEO_pEpRP2 + EpRP2 + EO_EpRP2 + ERP2 + pEpRP2 + pEO_pERP2 + EPO_OR + EPO + pEPO + pEPO_OpR + EPO_OpR + pEPO_OR + EKO + EKO_OpR + EpKO_OR + pEpKO + EpKO + pEpKO_OpR + pEKO_OR + pEpKO_OR + EKO_OR + EpKO_OpR + pEKO_OpR + pEKO + pEO_pEpRSUBC + EO_EpRSUBC + pEpRSUBC + EpRSUBC + pEO_pEpRSUBCSUBF + pEO_pEpRSUBF + EO_OpRSUBF + pEpKO_OpRSUBF + EpRSUBCSUBF + pEPO_OpRSUBF + EpKO_OpRSUBF + pEpRSUBCSUBF + EpR_OpRSUBF + pEpRP2SUBF + pEO_pEpR_OpRSUBF + EO_EpRSUBCSUBF + EpRSUBF + pEKO_OpRSUBF + EO_EpRP2SUBF + pEpRSUBF + EKO_OpRSUBF + EPO_OpRSUBF + EO_EpRSUBF + EO_EpR_OpRSUBF + pEpR_OpRSUBF + EpRP2SUBF + pEO_OpRSUBF + pEO_pEpRP2SUBF);
  kon_EO_a := a*kon_EO;
  kon_OR_a := a*kon_OR;
  kon_ER_a := a*kon_ER;
  SUBC := SUBCtot - (pSUBC + pRSUBC + pEO_pEpRSUBC + EO_EpRSUBC + pEpRSUBC + EpRSUBC);
  SUBF := SUBFtot - (pSUBF + pEO_pEpRSUBCSUBF + OpRSUBF + pEO_pEpRSUBF + EO_OpRSUBF + pEpKO_OpRSUBF + EpRSUBCSUBF + pEPO_OpRSUBF + EpKO_OpRSUBF + pEpRSUBCSUBF + pRSUBF + EpR_OpRSUBF + pEpRP2SUBF + pEO_pEpR_OpRSUBF + EO_EpRSUBCSUBF + EpRSUBF + pRP2SUBF + pEKO_OpRSUBF + EO_EpRP2SUBF + pEpRSUBF + pRSUBCSUBF + EKO_OpRSUBF + EPO_OpRSUBF + EO_EpRSUBF + EO_EpR_OpRSUBF + pEpR_OpRSUBF + EpRP2SUBF + pEO_OpRSUBF + pEO_pEpRP2SUBF);

  // Reactions:
  vER: $E + $R -> ER; kon_ER_factor*kon_ER*E*R - koff_ER*ER;
  vEpR: $E + pR -> EpR; kon_ER_factor*kon_ER*E*pR - koff_EpR*EpR;
  vpER: pE + $R -> pER; kon_ER_factor*kon_ER*pE*R - koff_ER*pER;
  vpEpR: pE + pR -> pEpR; kon_ER_factor*kon_ER*pE*pR - koff_EpR*pEpR;
  vEO_ER_EO: EO + $R -> EO_ER; kon_ER_factor*kon_ER*EO*R - koff_ER*EO_ER;
  vER_OR_OR: $E + OR -> ER_OR; kon_ER_factor*kon_ER*E*OR - koff_ER*ER_OR;
  vEO_EpR_EO: EO + pR -> EO_EpR; kon_ER_factor*kon_ER*EO*pR - koff_EpR*EO_EpR;
  vEpR_OpR_OpR: $E + OpR -> EpR_OpR; kon_ER_factor*kon_ER*E*OpR - koff_EpR*EpR_OpR;
  vpEO_pER_pEO: pEO + $R -> pEO_pER; kon_ER_factor*kon_ER*pEO*R - koff_ER*pEO_pER;
  vpER_OR_OR: pE + OR -> pER_OR; kon_ER_factor*kon_ER*pE*OR - koff_ER*pER_OR;
  vpEpR_OpR_OpR: pE + OpR -> pEpR_OpR; kon_ER_factor*kon_ER*pE*OpR - koff_EpR*pEpR_OpR;
  vpEO_pEpR_pEO: pEO + pR -> pEO_pEpR; kon_ER_factor*kon_ER*pEO*pR - koff_EpR*pEO_pEpR;
  vEO_ER_OR_EOor: EO_OR -> EO_ER_OR; kon_ER_factor*kon_ER_a*EO_OR - koff_ER_d*EO_ER_OR;
  vEO_ERo_OpR_EOOpR: EO_OpR -> EO_EpR_OpR; kon_ER_factor*kon_ER_a*EO_OpR - koff_EpR_d*EO_EpR_OpR;
  vpEO_pER_OR_pEOor: pEO_OR -> pEO_pER_OR; kon_ER_factor*kon_ER_a*pEO_OR - koff_ER_d*pEO_pER_OR;
  vpEO_pEpR_OpR_pEOOpR: pEO_OpR -> pEO_pEpR_OpR; kon_ER_factor*kon_ER_a*pEO_OpR - koff_EpR_d*pEO_pEpR_OpR;
  vEO: $E + $O -> EO; kon_EO_factor*kon_EO*E*O - koff_EO*EO;
  vpEO: pE + $O -> pEO; kon_EO_factor*kon_EO*pE*O - koff_pEO*pEO;
  vEO_OR_OR: $E + OR -> EO_OR; kon_EO_factor*kon_EO*E*OR - koff_EO*EO_OR;
  vEO_ER_ER: ER + $O -> EO_ER; kon_EO_factor*kon_EO*ER*O - koff_EO*EO_ER;
  vEO_OpR_OpR: $E + OpR -> EO_OpR; kon_EO_factor*kon_EO*E*OpR - koff_EO*EO_OpR;
  vpEO_OR_OR: pE + OR -> pEO_OR; kon_EO_factor*kon_EO*pE*OR - koff_pEO*pEO_OR;
  vEO_EpR_EpR: EpR + $O -> EO_EpR; kon_EO_factor*kon_EO*EpR*O - koff_EO*EO_EpR;
  pEO_pER_pER: pER + $O -> pEO_pER; kon_EO_factor*kon_EO*pER*O - koff_pEO*pEO_pER;
  vpEO_OpR_OpR: pE + OpR -> pEO_OpR; kon_EO_factor*kon_EO*pE*OpR - koff_pEO*pEO_OpR;
  vpEO_pEpR_pEpR: pEpR + $O -> pEO_pEpR; kon_EO_factor*kon_EO*pEpR*O - koff_pEO*pEO_pEpR;
  vEO_ER_OR_ERor: ER_OR -> EO_ER_OR; kon_EO_a*ER_OR - koff_EO_d*EO_ER_OR;
  vEO_EpR_OpR_EpROpR: EpR_OpR -> EO_EpR_OpR; kon_EO_a*EpR_OpR - koff_EO_d*EO_EpR_OpR;
  vpEO_pER_OR_pERor: pER_OR -> pEO_pER_OR; kon_EO_a*pER_OR - koff_pEO_d*pEO_pER_OR;
  vpEO_pEpR_OpR_pEpROpR: pEpR_OpR -> pEO_pEpR_OpR; kon_EO_a*pEpR_OpR - koff_pEO_d*pEO_pEpR_OpR;
  vor: $O + $R -> OR; kon_OR_factor*kon_OR*O*R - koff_OR*OR;
  vOpR: $O + pR -> OpR; kon_OR_factor*kon_OR*O*pR - koff_OpR*OpR;
  vEO_OR_EO: EO + $R -> EO_OR; kon_OR_factor*kon_OR*EO*R - koff_OR*EO_OR;
  vER_OR_ER: $O + ER -> ER_OR; kon_OR_factor*kon_OR*O*ER - koff_OR*ER_OR;
  vEO_OpR_EO: EO + pR -> EO_OpR; kon_OR_factor*kon_OR*EO*pR - koff_OpR*EO_OpR;
  vEpR_OpR_EpR: $O + EpR -> EpR_OpR; kon_OR_factor*kon_OR*O*EpR - koff_OpR*EpR_OpR;
  vpEO_OR_pEO: pEO + $R -> pEO_OR; kon_OR_factor*kon_OR*pEO*R - koff_OR*pEO_OR;
  vpER_OR_pER: $O + pER -> pER_OR; kon_OR_factor*kon_OR*O*pER - koff_OR*pER_OR;
  vpEO_OpR_pEO: pEO + pR -> pEO_OpR; kon_OR_factor*kon_OR*pEO*pR - koff_OpR*pEO_OpR;
  vpEpR_OpR_pEpR: $O + pEpR -> pEpR_OpR; kon_OR_factor*kon_OR*O*pEpR - koff_OpR*pEpR_OpR;
  vEO_ER_OR_EOER: EO_ER -> EO_ER_OR; kon_OR_factor*kon_OR_a*EO_ER - koff_OR_d*EO_ER_OR;
  vEO_EpR_OpR_EOEpR: EO_EpR -> EO_EpR_OpR; kon_OR_factor*kon_OR_a*EO_EpR - koff_OpR_d*EO_EpR_OpR;
  vpEO_pER_OR_pEOpER: pEO_pER -> pEO_pER_OR; kon_OR_factor*kon_OR_a*pEO_pER - koff_OR_d*pEO_pER_OR;
  vpEO_pEpR_OpR_pEOpEpR: pEO_pEpR -> pEO_pEpR_OpR; kon_OR_factor*kon_OR_a*pEO_pEpR - koff_OpR_d*pEO_pEpR_OpR;
  vpEpR_OpR_pERor: pER_OR => OpR + pE; kp_R_on*kp_R*pER_OR;
  vpEpR_pER: pER => pR + pE; kp_R_on*kp_R*pER;
  vEK: $E + K -> EK; kon_EK*E*K - koff_EK*EK;
  vpEK: pE + K -> pEK; kon_EK*pE*K - koff_EK*pEK;
  vK_act: K -> $pK; (kp_K_bg + kp_K_egf*kp_K_on)*K - kdp_K*pK;
  vEpK: $E + $pK -> EpK; kon_EK*E*pK - koff_EK*EpK;
  vpEpK: pE + $pK -> pEpK; kon_EK*pE*pK - koff_EK*pEpK;
  vpE_EK: EpK => pE + $pK; kp_E_on*kp_E*EpK;
  vpEp: $E + $P -> EP; kon_EP*E*P - koff_EP*EP;
  vpEpp: pE + $P -> pEP; kon_EP*pE*P - koff_EP*pEP;
  ve_pEpp: pEP => $E + $P; kdp_E_on*kdp_E*pEP;
  vpRP2: pR + $P2 -> pRP2; kon_RP2*pR*P2 - koff_RP2*pRP2;
  vr_pRP2: pRP2 => $R + $P2; kdp_R*pRP2;
  vr_P2: $R + $P2 -> RP2; kon_RP2*R*P2 - koff_RP2*RP2;
  vER_P2: ER + $P2 -> ERP2; kon_RP2*ER*P2 - koff_RP2*ERP2;
  ve_RP2: $E + RP2 -> ERP2; kon_ER*E*RP2 - koff_ER*ERP2;
  vpER_P2: pER + $P2 -> pERP2; kon_RP2*pER*P2 - koff_RP2*pERP2;
  vpE_RP2: pE + RP2 -> pERP2; kon_ER*pE*RP2 - koff_ER*pERP2;
  vEO_ER_P2: EO_ER + $P2 -> EO_ERP2; kon_RP2*EO_ER*P2 - koff_RP2*EO_ERP2;
  vEO_RP2: EO + RP2 -> EO_ERP2; kon_ER*EO*RP2 - koff_ER*EO_ERP2;
  vERP2_o: ERP2 + $O -> EO_ERP2; kon_EO*ERP2*O - koff_EO*EO_ERP2;
  vpEO_pER_P2: pEO_pER + $P2 -> pEO_pERP2; kon_RP2*pEO_pER*P2 - koff_RP2*pEO_pERP2;
  vpEO_RP2: pEO + RP2 -> pEO_pERP2; kon_ER*pEO*RP2 - koff_ER*pEO_pERP2;
  vpERP2_o: pERP2 + $O -> pEO_pERP2; kon_EO*pERP2*O - koff_pEO*pEO_pERP2;
  vEpR_P2: EpR + $P2 -> EpRP2; kon_RP2*EpR*P2 - koff_RP2*EpRP2;
  ve_pRP2: $E + pRP2 -> EpRP2; kon_ER*E*pRP2 - koff_EpR*EpRP2;
  vpEpR_P2: pEpR + $P2 -> pEpRP2; kon_RP2*pEpR*P2 - koff_RP2*pEpRP2;
  vpE_pRP2: pE + pRP2 -> pEpRP2; kon_ER*pE*pRP2 - koff_EpR*pEpRP2;
  vEO_EpR_P2: EO_EpR + $P2 -> EO_EpRP2; kon_RP2*EO_EpR*P2 - koff_RP2*EO_EpRP2;
  vEO_pRP2: EO + pRP2 -> EO_EpRP2; kon_ER*EO*pRP2 - koff_EpR*EO_EpRP2;
  vEpRP2_o: EpRP2 + $O -> EO_EpRP2; kon_EO*EpRP2*O - koff_EO*EO_EpRP2;
  vpEO_pEpR_P2: pEO_pEpR + $P2 -> pEO_pEpRP2; kon_RP2*pEO_pEpR*P2 - koff_RP2*pEO_pEpRP2;
  vpEO_pRP2: pEO + pRP2 -> pEO_pEpRP2; kon_ER*pEO*pRP2 - koff_EpR*pEO_pEpRP2;
  vpEpRP2_o: pEpRP2 + $O -> pEO_pEpRP2; kon_EO*pEpRP2*O - koff_pEO*pEO_pEpRP2;
  vER_P2_cat: EpRP2 -> ER + $P2; kdp_R*EpRP2;
  vpER_P2_cat: pEpRP2 -> pER + $P2; kdp_R*pEpRP2;
  vEO_ER_P2_cat: EO_EpRP2 -> EO_ER + $P2; kdp_R*EO_EpRP2;
  vpEO_ER_P2_cat: pEO_pEpRP2 -> pEO_ER + $P2; kdp_R*pEO_pEpRP2;
  vEO_P: EO + $P -> EPO; kon_EP*EO*P - koff_EP*EPO;
  vEP_o: EP + $O -> EPO; kon_EO*EP*O - koff_EO*EPO;
  vpEO_P: pEO + $P -> pEPO; kon_EP*pEO*P - koff_EP*pEPO;
  vpEP_o: pEP + $O -> pEPO; kon_EO*pEP*O - koff_pEO*pEPO;
  vEO_OR_P: EO_OR + $P -> EPO_OR; kon_EP*EO_OR*P - koff_EP*EPO_OR;
  vEP_OR: EP + OR -> EPO_OR; kon_EO*EP*OR - koff_EO*EPO_OR;
  vEPO_r: EPO + $R -> EPO_OR; kon_OR*EPO*R - koff_OR*EPO_OR;
  vpEO_OR_P: pEO_OR + $P -> pEPO_OR; kon_EP*pEO_OR*P - koff_EP*pEPO_OR;
  vpEP_OR: pEP + OR -> pEPO_OR; kon_EO*pEP*OR - koff_pEO*pEPO_OR;
  vpEPO_r: pEPO + $R -> pEPO_OR; kon_OR*pEPO*R - koff_OR*pEPO_OR;
  vEO_OpR_P: EO_OpR + $P -> EPO_OpR; kon_EP*EO_OpR*P - koff_EP*EPO_OpR;
  vEP_OpR: EP + OpR -> EPO_OpR; kon_EO*EP*OpR - koff_EO*EPO_OpR;
  vEPO_pR: EPO + pR -> EPO_OpR; kon_OR*EPO*pR - koff_OpR*EPO_OpR;
  vpEO_OpR_P: pEO_OpR + $P -> pEPO_OpR; kon_EP*pEO_OpR*P - koff_EP*pEPO_OpR;
  vpEP_OpR: pEP + OpR -> pEPO_OpR; kon_EO*pEP*OpR - koff_pEO*pEPO_OpR;
  vpEPO_pR: pEPO + pR -> pEPO_OpR; kon_OR*pEPO*pR - koff_OpR*pEPO_OpR;
  vEO_pK: EO + $pK -> EpKO; kon_EK*EO*pK - koff_EK*EpKO;
  vEpK_O: EpK + $O -> EpKO; kon_EO*EpK*O - koff_EO*EpKO;
  vpEO_pK: pEO + $pK -> pEpKO; kon_EK*pEO*pK - koff_EK*pEpKO;
  vpEpK_O: pEpK + $O -> pEpKO; kon_EO*pEpK*O - koff_pEO*pEpKO;
  vEO_OR_pK: EO_OR + $pK -> EpKO_OR; kon_EK*EO_OR*pK - koff_EK*EpKO_OR;
  vEpK_OR: EpK + OR -> EpKO_OR; kon_EO*EpK*OR - koff_EO*EpKO_OR;
  vEpKO_r: EpKO + $R -> EpKO_OR; kon_OR*EpKO*R - koff_OR*EpKO_OR;
  vpEO_OR_pK: pEO_OR + $pK -> pEpKO_OR; kon_EK*pEO_OR*pK - koff_EK*pEpKO_OR;
  vpEpK_OR: pEpK + OR -> pEpKO_OR; kon_EO*pEpK*OR - koff_pEO*pEpKO_OR;
  vpEpKO_R: pEpKO + $R -> pEpKO_OR; kon_OR*pEpKO*R - koff_OR*pEpKO_OR;
  vEO_OpR_pK: EO_OpR + $pK -> EpKO_OpR; kon_EK*EO_OpR*pK - koff_EK*EpKO_OpR;
  vEpK_OpR: EpK + OpR -> EpKO_OpR; kon_EO*EpK*OpR - koff_EO*EpKO_OpR;
  vEpKO_pR: EpKO + pR -> EpKO_OpR; kon_OR*EpKO*pR - koff_OpR*EpKO_OpR;
  vpEO_OpR_pK: pEO_OpR + $pK -> pEpKO_OpR; kon_EK*pEO_OpR*pK - koff_EK*pEpKO_OpR;
  vpEpK_OpR: pEpK + OpR -> pEpKO_OpR; kon_EO*pEpK*OpR - koff_pEO*pEpKO_OpR;
  vpEpKO_pR: pEpKO + pR -> pEpKO_OpR; kon_OR*pEpKO*pR - koff_OpR*pEpKO_OpR;
  vEO_K: EO + K -> EKO; kon_EK*EO*K - koff_EK*EKO;
  vEK_O: EK + $O -> EKO; kon_EO*EK*O - koff_EO*EKO;
  vpEO_K: pEO + K -> pEKO; kon_EK*pEO*K - koff_EK*pEKO;
  vpEK_O: pEK + $O -> pEKO; kon_EO*pEK*O - koff_pEO*pEKO;
  vEO_OR_K: EO_OR + K -> EKO_OR; kon_EK*EO_OR*K - koff_EK*EKO_OR;
  vEK_OR: EK + OR -> EKO_OR; kon_EO*EK*OR - koff_EO*EKO_OR;
  vEKO_R: EKO + $R -> EKO_OR; kon_OR*EKO*R - koff_OR*EKO_OR;
  vpEO_OR_K: pEO_OR + K -> pEKO_OR; kon_EK*pEO_OR*K - koff_EK*pEKO_OR;
  vpEK_OR: pEK + OR -> pEKO_OR; kon_EO*pEK*OR - koff_pEO*pEKO_OR;
  vpEKO_R: pEKO + $R -> pEKO_OR; kon_OR*pEKO*R - koff_OR*pEKO_OR;
  vEO_OpR_K: EO_OpR + K -> EKO_OpR; kon_EK*EO_OpR*K - koff_EK*EKO_OpR;
  vEK_OpR: EK + OpR -> EKO_OpR; kon_EO*EK*OpR - koff_EO*EKO_OpR;
  vEKO_pR: EKO + pR -> EKO_OpR; kon_OR*EKO*pR - koff_OpR*EKO_OpR;
  vpEO_OpR_K: pEO_OpR + K -> pEKO_OpR; kon_EK*pEO_OpR*K - koff_EK*pEKO_OpR;
  vpEK_OpR: pEK + OpR -> pEKO_OpR; kon_EO*pEK*OpR - koff_pEO*pEKO_OpR;
  vpEKO_pR: pEKO + pR -> pEKO_OpR; kon_OR*pEKO*pR - koff_OpR*pEKO_OpR;
  vE_pRSUBC__EpRSUBC: $E + pRSUBC -> EpRSUBC; kon_ER_factor*kon_ER*E*pRSUBC - koff_EpR*EpRSUBC;
  vpRSUBC_pE__pEpRSUBC: pRSUBC + pE -> pEpRSUBC; kon_ER_factor*kon_ER*pE*pRSUBC - koff_EpR*pEpRSUBC;
  vEO_pRSUBC__EO_EpRSUBC: EO + pRSUBC -> EO_EpRSUBC; kon_ER_factor*kon_ER*EO*pRSUBC - koff_EpR*EO_EpRSUBC;
  vpRSUBC_pEO__pEO_pEpRSUBC: pRSUBC + pEO -> pEO_pEpRSUBC; kon_ER_factor*kon_ER*pEO*pRSUBC - koff_EpR*pEO_pEpRSUBC;
  vO_EpRSUBC__EO_EpRSUBC: $O + EpRSUBC -> EO_EpRSUBC; kon_EO_factor*kon_EO*EpRSUBC*O - koff_EO*EO_EpRSUBC;
  vO_pEpRSUBC__pEO_pEpRSUBC: $O + pEpRSUBC -> pEO_pEpRSUBC; kon_EO_factor*kon_EO*pEpRSUBC*O - koff_pEO*pEO_pEpRSUBC;
  vpR_SUBC: pR + $SUBC -> pRSUBC; kon_pRSUB*pR*SUBC - koff_pRSUB*pRSUBC;
  vEpR_SUBC: EpR + $SUBC -> EpRSUBC; kon_pRSUB*EpR*SUBC - koff_pRSUB*EpRSUBC;
  vpEpR_SUBC: pEpR + $SUBC -> pEpRSUBC; kon_pRSUB*pEpR*SUBC - koff_pRSUB*pEpRSUBC;
  vEO_EpR_SUBC: EO_EpR + $SUBC -> EO_EpRSUBC; kon_pRSUB*EO_EpR*SUBC - koff_pRSUB*EO_EpRSUBC;
  vpEO_pEpR_SUBC: pEO_pEpR + $SUBC -> pEO_pEpRSUBC; kon_pRSUB*pEO_pEpR*SUBC - koff_pRSUB*pEO_pEpRSUBC;
  vpR_pSUBC_cat: pRSUBC -> pR + pSUBC; kp_SUB*pRSUBC;
  vpEO_pEpR_pSUBC_cat: pEO_pEpRSUBC -> pEO_pEpR + pSUBC; kp_SUB*pEO_pEpRSUBC;
  vEO_EpR_pSUBC_cat: EO_EpRSUBC -> EO_EpR + pSUBC; kp_SUB*EO_EpRSUBC;
  vpEpR_pSUBC_cat: pEpRSUBC -> pEpR + pSUBC; kp_SUB*pEpRSUBC;
  vEpR_pSUBC_cat: EpRSUBC -> EpR + pSUBC; kp_SUB*EpRSUBC;
  vSUBC_cat: pSUBC -> $SUBC; kdp_SUB*pSUBC;
  vE_pRSUBF__EpRSUBF: $E + pRSUBF -> EpRSUBF; kon_ER_factor*kon_ER*E*pRSUBF - koff_EpR*EpRSUBF;
  vpRSUBF_pE__pEpRSUBF: pRSUBF + pE -> pEpRSUBF; kon_ER_factor*kon_ER*pE*pRSUBF - koff_EpR*pEpRSUBF;
  vEO_pRSUBF__EO_EpRSUBF: EO + pRSUBF -> EO_EpRSUBF; kon_ER_factor*kon_ER*EO*pRSUBF - koff_EpR*EO_EpRSUBF;
  vE_OpRSUBF__EpR_OpRSUBF: $E + OpRSUBF -> EpR_OpRSUBF; kon_ER_factor*kon_ER*E*OpRSUBF - koff_EpR*EpR_OpRSUBF;
  vOpRSUBF_pE__pEpR_OpRSUBF: OpRSUBF + pE -> pEpR_OpRSUBF; kon_ER_factor*kon_ER*pE*OpRSUBF - koff_EpR*pEpR_OpRSUBF;
  vpRSUBF_pEO__pEO_pEpRSUBF: pRSUBF + pEO -> pEO_pEpRSUBF; kon_ER_factor*kon_ER*pEO*pRSUBF - koff_EpR*pEO_pEpRSUBF;
  vE_OpRSUBF__EO_OpRSUBF: $E + OpRSUBF -> EO_OpRSUBF; kon_EO_factor*kon_EO*E*OpRSUBF - koff_EO*EO_OpRSUBF;
  vO_EpRSUBF__EO_EpRSUBF: $O + EpRSUBF -> EO_EpRSUBF; kon_EO_factor*kon_EO*EpRSUBF*O - koff_EO*EO_EpRSUBF;
  vOpRSUBF_pE__pEO_OpRSUBF: OpRSUBF + pE -> pEO_OpRSUBF; kon_EO_factor*kon_EO*pE*OpRSUBF - koff_pEO*pEO_OpRSUBF;
  vO_pEpRSUBF__pEO_pEpRSUBF: $O + pEpRSUBF -> pEO_pEpRSUBF; kon_EO_factor*kon_EO*pEpRSUBF*O - koff_pEO*pEO_pEpRSUBF;
  vO_pRSUBF__OpRSUBF: $O + pRSUBF -> OpRSUBF; kon_OR_factor*kon_OR*O*pRSUBF - koff_OpR*OpRSUBF;
  vEO_pRSUBF__EO_OpRSUBF: EO + pRSUBF -> EO_OpRSUBF; kon_OR_factor*kon_OR*EO*pRSUBF - koff_OpR*EO_OpRSUBF;
  vO_EpRSUBF__EpR_OpRSUBF: $O + EpRSUBF -> EpR_OpRSUBF; kon_OR_factor*kon_OR*O*EpRSUBF - koff_OpR*EpR_OpRSUBF;
  vpRSUBF_pEO__pEO_OpRSUBF: pRSUBF + pEO -> pEO_OpRSUBF; kon_OR_factor*kon_OR*pEO*pRSUBF - koff_OpR*pEO_OpRSUBF;
  vO_pEpRSUBF__pEpR_OpRSUBF: $O + pEpRSUBF -> pEpR_OpRSUBF; kon_OR_factor*kon_OR*O*pEpRSUBF - koff_OpR*pEpR_OpRSUBF;
  vpRSUBF_P2__pRP2SUBF: pRSUBF + $P2 -> pRP2SUBF; kon_RP2*pRSUBF*P2 - koff_RP2*pRP2SUBF;
  vEpRSUBF_P2__EpRP2SUBF: EpRSUBF + $P2 -> EpRP2SUBF; kon_RP2*EpRSUBF*P2 - koff_RP2*EpRP2SUBF;
  vE_pRP2SUBF__EpRP2SUBF: $E + pRP2SUBF -> EpRP2SUBF; kon_ER*E*pRP2SUBF - koff_EpR*EpRP2SUBF;
  vpEpRSUBF_P2__pEpRP2SUBF: pEpRSUBF + $P2 -> pEpRP2SUBF; kon_RP2*pEpRSUBF*P2 - koff_RP2*pEpRP2SUBF;
  vpE_pRP2SUBF__pEpRP2SUBF: pE + pRP2SUBF -> pEpRP2SUBF; kon_ER*pE*pRP2SUBF - koff_EpR*pEpRP2SUBF;
  vEO_EpRSUBF_P2__EO_EpRP2SUBF: EO_EpRSUBF + $P2 -> EO_EpRP2SUBF; kon_RP2*EO_EpRSUBF*P2 - koff_RP2*EO_EpRP2SUBF;
  vEO_pRP2SUBF__EO_EpRP2SUBF: EO + pRP2SUBF -> EO_EpRP2SUBF; kon_ER*EO*pRP2SUBF - koff_EpR*EO_EpRP2SUBF;
  vO_EpRP2SUBF__EO_EpRP2SUBF: $O + EpRP2SUBF -> EO_EpRP2SUBF; kon_EO*EpRP2SUBF*O - koff_EO*EO_EpRP2SUBF;
  vpEO_pEpRSUBF_P2__pEO_pEpRP2SUBF: pEO_pEpRSUBF + $P2 -> pEO_pEpRP2SUBF; kon_RP2*pEO_pEpRSUBF*P2 - koff_RP2*pEO_pEpRP2SUBF;
  vpEO_pRP2SUBF__pEO_pEpRP2SUBF: pEO + pRP2SUBF -> pEO_pEpRP2SUBF; kon_ER*pEO*pRP2SUBF - koff_EpR*pEO_pEpRP2SUBF;
  vO_pEpRP2SUBF__pEO_pEpRP2SUBF: $O + pEpRP2SUBF -> pEO_pEpRP2SUBF; kon_EO*pEpRP2SUBF*O - koff_pEO*pEO_pEpRP2SUBF;
  vEO_OpRSUBF_P__EPO_OpRSUBF: EO_OpRSUBF + $P -> EPO_OpRSUBF; kon_EP*EO_OpRSUBF*P - koff_EP*EPO_OpRSUBF;
  vOpRSUBF_EP__EPO_OpRSUBF: OpRSUBF + EP -> EPO_OpRSUBF; kon_EO*EP*OpRSUBF - koff_EO*EPO_OpRSUBF;
  vpRSUBF_EPO__EPO_OpRSUBF: pRSUBF + EPO -> EPO_OpRSUBF; kon_OR*EPO*pRSUBF - koff_OpR*EPO_OpRSUBF;
  vpEO_OpRSUBF_P__pEPO_OpRSUBF: pEO_OpRSUBF + $P -> pEPO_OpRSUBF; kon_EP*pEO_OpRSUBF*P - koff_EP*pEPO_OpRSUBF;
  vOpRSUBF_pEP__pEPO_OpRSUBF: OpRSUBF + pEP -> pEPO_OpRSUBF; kon_EO*pEP*OpRSUBF - koff_pEO*pEPO_OpRSUBF;
  vpRSUBF_pEPO__pEPO_OpRSUBF: pRSUBF + pEPO -> pEPO_OpRSUBF; kon_OR*pEPO*pRSUBF - koff_OpR*pEPO_OpRSUBF;
  vEO_OpRSUBF_pK__EpKO_OpRSUBF: EO_OpRSUBF + $pK -> EpKO_OpRSUBF; kon_EK*EO_OpRSUBF*pK - koff_EK*EpKO_OpRSUBF;
  vOpRSUBF_EpK__EpKO_OpRSUBF: OpRSUBF + EpK -> EpKO_OpRSUBF; kon_EO*EpK*OpRSUBF - koff_EO*EpKO_OpRSUBF;
  vpRSUBF_EpKO__EpKO_OpRSUBF: pRSUBF + EpKO -> EpKO_OpRSUBF; kon_OR*EpKO*pRSUBF - koff_OpR*EpKO_OpRSUBF;
  vpEO_OpRSUBF_pK__pEpKO_OpRSUBF: pEO_OpRSUBF + $pK -> pEpKO_OpRSUBF; kon_EK*pEO_OpRSUBF*pK - koff_EK*pEpKO_OpRSUBF;
  vOpRSUBF_pEpK__pEpKO_OpRSUBF: OpRSUBF + pEpK -> pEpKO_OpRSUBF; kon_EO*pEpK*OpRSUBF - koff_pEO*pEpKO_OpRSUBF;
  vpRSUBF_pEpKO__pEpKO_OpRSUBF: pRSUBF + pEpKO -> pEpKO_OpRSUBF; kon_OR*pEpKO*pRSUBF - koff_OpR*pEpKO_OpRSUBF;
  vEO_OpRSUBF_K__EKO_OpRSUBF: EO_OpRSUBF + K -> EKO_OpRSUBF; kon_EK*EO_OpRSUBF*K - koff_EK*EKO_OpRSUBF;
  vOpRSUBF_EK__EKO_OpRSUBF: OpRSUBF + EK -> EKO_OpRSUBF; kon_EO*EK*OpRSUBF - koff_EO*EKO_OpRSUBF;
  vpRSUBF_EKO__EKO_OpRSUBF: pRSUBF + EKO -> EKO_OpRSUBF; kon_OR*EKO*pRSUBF - koff_OpR*EKO_OpRSUBF;
  vpEO_OpRSUBF_K__pEKO_OpRSUBF: pEO_OpRSUBF + K -> pEKO_OpRSUBF; kon_EK*pEO_OpRSUBF*K - koff_EK*pEKO_OpRSUBF;
  vOpRSUBF_pEK__pEKO_OpRSUBF: OpRSUBF + pEK -> pEKO_OpRSUBF; kon_EO*pEK*OpRSUBF - koff_pEO*pEKO_OpRSUBF;
  vpRSUBF_pEKO__pEKO_OpRSUBF: pRSUBF + pEKO -> pEKO_OpRSUBF; kon_OR*pEKO*pRSUBF - koff_OpR*pEKO_OpRSUBF;
  vE_pRSUBCSUBF__EpRSUBCSUBF: $E + pRSUBCSUBF -> EpRSUBCSUBF; kon_ER_factor*kon_ER*E*pRSUBCSUBF - koff_EpR*EpRSUBCSUBF;
  vpE_pRSUBCSUBF__pEpRSUBCSUBF: pE + pRSUBCSUBF -> pEpRSUBCSUBF; kon_ER_factor*kon_ER*pE*pRSUBCSUBF - koff_EpR*pEpRSUBCSUBF;
  vEO_pRSUBCSUBF__EO_EpRSUBCSUBF: EO + pRSUBCSUBF -> EO_EpRSUBCSUBF; kon_ER_factor*kon_ER*EO*pRSUBCSUBF - koff_EpR*EO_EpRSUBCSUBF;
  vpEO_pRSUBCSUBF__pEO_pEpRSUBCSUBF: pEO + pRSUBCSUBF -> pEO_pEpRSUBCSUBF; kon_ER_factor*kon_ER*pEO*pRSUBCSUBF - koff_EpR*pEO_pEpRSUBCSUBF;
  vO_EpRSUBCSUBF__EO_EpRSUBCSUBF: $O + EpRSUBCSUBF -> EO_EpRSUBCSUBF; kon_EO_factor*kon_EO*EpRSUBCSUBF*O - koff_EO*EO_EpRSUBCSUBF;
  vO_pEpRSUBCSUBF__pEO_pEpRSUBCSUBF: $O + pEpRSUBCSUBF -> pEO_pEpRSUBCSUBF; kon_EO_factor*kon_EO*pEpRSUBCSUBF*O - koff_pEO*pEO_pEpRSUBCSUBF;
  vpRSUBF_SUBC__pRSUBCSUBF: pRSUBF + $SUBC -> pRSUBCSUBF; kon_pRSUB*pRSUBF*SUBC - koff_pRSUB*pRSUBCSUBF;
  vEpRSUBF_SUBC__EpRSUBCSUBF: EpRSUBF + $SUBC -> EpRSUBCSUBF; kon_pRSUB*EpRSUBF*SUBC - koff_pRSUB*EpRSUBCSUBF;
  vpEpRSUBF_SUBC__pEpRSUBCSUBF: pEpRSUBF + $SUBC -> pEpRSUBCSUBF; kon_pRSUB*pEpRSUBF*SUBC - koff_pRSUB*pEpRSUBCSUBF;
  vEO_EpRSUBF_SUBC__EO_EpRSUBCSUBF: EO_EpRSUBF + $SUBC -> EO_EpRSUBCSUBF; kon_pRSUB*EO_EpRSUBF*SUBC - koff_pRSUB*EO_EpRSUBCSUBF;
  vpEO_pEpRSUBF_SUBC__pEO_pEpRSUBCSUBF: pEO_pEpRSUBF + $SUBC -> pEO_pEpRSUBCSUBF; kon_pRSUB*pEO_pEpRSUBF*SUBC - koff_pRSUB*pEO_pEpRSUBCSUBF;
  vpR_SUBF: pR + $SUBF -> pRSUBF; kon_pRSUB*pR*SUBF - koff_pRSUB*pRSUBF;
  vEpR_SUBF: EpR + $SUBF -> EpRSUBF; kon_pRSUB*EpR*SUBF - koff_pRSUB*EpRSUBF;
  vpEpR_SUBF: pEpR + $SUBF -> pEpRSUBF; kon_pRSUB*pEpR*SUBF - koff_pRSUB*pEpRSUBF;
  vOpR_SUBF: OpR + $SUBF -> OpRSUBF; kon_pRSUB*OpR*SUBF - koff_pRSUB*OpRSUBF;
  vpEO_OpR_SUBF: pEO_OpR + $SUBF -> pEO_OpRSUBF; kon_pRSUB*pEO_OpR*SUBF - koff_pRSUB*pEO_OpRSUBF;
  vEO_OpR_SUBF: EO_OpR + $SUBF -> EO_OpRSUBF; kon_pRSUB*EO_OpR*SUBF - koff_pRSUB*EO_OpRSUBF;
  vEO_EpR_SUBF: EO_EpR + $SUBF -> EO_EpRSUBF; kon_pRSUB*EO_EpR*SUBF - koff_pRSUB*EO_EpRSUBF;
  vpEO_pEpR_SUBF: pEO_pEpR + $SUBF -> pEO_pEpRSUBF; kon_pRSUB*pEO_pEpR*SUBF - koff_pRSUB*pEO_pEpRSUBF;
  vEpR_OpR_SUBF: EpR_OpR + $SUBF -> EpR_OpRSUBF; kon_pRSUB*EpR_OpR*SUBF - koff_pRSUB*EpR_OpRSUBF;
  vpEpR_OpR_SUBF: pEpR_OpR + $SUBF -> pEpR_OpRSUBF; kon_pRSUB*pEpR_OpR*SUBF - koff_pRSUB*pEpR_OpRSUBF;
  vEO_EpR_OpR_SUBF: EO_EpR_OpR + $SUBF -> EO_EpR_OpRSUBF; kon_pRSUB*EO_EpR_OpR*SUBF - koff_pRSUB*EO_EpR_OpRSUBF;
  vpEO_pEpR_OpR_SUBF: pEO_pEpR_OpR + $SUBF -> pEO_pEpR_OpRSUBF; kon_pRSUB*pEO_pEpR_OpR*SUBF - koff_pRSUB*pEO_pEpR_OpRSUBF;
  vpRP2_SUBF: pRP2 + $SUBF -> pRP2SUBF; kon_pRSUB*pRP2*SUBF - koff_pRSUB*pRP2SUBF;
  vpEO_pEpRP2_SUBF: pEO_pEpRP2 + $SUBF -> pEO_pEpRP2SUBF; kon_pRSUB*pEO_pEpRP2*SUBF - koff_pRSUB*pEO_pEpRP2SUBF;
  vEpRP2_SUBF: EpRP2 + $SUBF -> EpRP2SUBF; kon_pRSUB*EpRP2*SUBF - koff_pRSUB*EpRP2SUBF;
  vEO_EpRP2_SUBF: EO_EpRP2 + $SUBF -> EO_EpRP2SUBF; kon_pRSUB*EO_EpRP2*SUBF - koff_pRSUB*EO_EpRP2SUBF;
  vpEpRP2_SUBF: pEpRP2 + $SUBF -> pEpRP2SUBF; kon_pRSUB*pEpRP2*SUBF - koff_pRSUB*pEpRP2SUBF;
  vpEPO_OpR_SUBF: pEPO_OpR + $SUBF -> pEPO_OpRSUBF; kon_pRSUB*pEPO_OpR*SUBF - koff_pRSUB*pEPO_OpRSUBF;
  vEPO_OpR_SUBF: EPO_OpR + $SUBF -> EPO_OpRSUBF; kon_pRSUB*EPO_OpR*SUBF - koff_pRSUB*EPO_OpRSUBF;
  vEKO_OpR_SUBF: EKO_OpR + $SUBF -> EKO_OpRSUBF; kon_pRSUB*EKO_OpR*SUBF - koff_pRSUB*EKO_OpRSUBF;
  vpEpKO_OpR_SUBF: pEpKO_OpR + $SUBF -> pEpKO_OpRSUBF; kon_pRSUB*pEpKO_OpR*SUBF - koff_pRSUB*pEpKO_OpRSUBF;
  vEpKO_OpR_SUBF: EpKO_OpR + $SUBF -> EpKO_OpRSUBF; kon_pRSUB*EpKO_OpR*SUBF - koff_pRSUB*EpKO_OpRSUBF;
  vpEKO_OpR_SUBF: pEKO_OpR + $SUBF -> pEKO_OpRSUBF; kon_pRSUB*pEKO_OpR*SUBF - koff_pRSUB*pEKO_OpRSUBF;
  vpRSUBC_SUBF: pRSUBC + $SUBF -> pRSUBCSUBF; kon_pRSUB*pRSUBC*SUBF - koff_pRSUB*pRSUBCSUBF;
  vpEO_pEpRSUBC_SUBF: pEO_pEpRSUBC + $SUBF -> pEO_pEpRSUBCSUBF; kon_pRSUB*pEO_pEpRSUBC*SUBF - koff_pRSUB*pEO_pEpRSUBCSUBF;
  vEO_EpRSUBC_SUBF: EO_EpRSUBC + $SUBF -> EO_EpRSUBCSUBF; kon_pRSUB*EO_EpRSUBC*SUBF - koff_pRSUB*EO_EpRSUBCSUBF;
  vpEpRSUBC_SUBF: pEpRSUBC + $SUBF -> pEpRSUBCSUBF; kon_pRSUB*pEpRSUBC*SUBF - koff_pRSUB*pEpRSUBCSUBF;
  vEpRSUBC_SUBF: EpRSUBC + $SUBF -> EpRSUBCSUBF; kon_pRSUB*EpRSUBC*SUBF - koff_pRSUB*EpRSUBCSUBF;
  vpEO_pEpRSUBC_pSUBF_cat: pEO_pEpRSUBCSUBF -> pEO_pEpRSUBC + pSUBF; kp_SUB*pEO_pEpRSUBCSUBF;
  vOpR_pSUBF_cat: OpRSUBF -> OpR + pSUBF; kp_SUB*OpRSUBF;
  vpEO_pEpR_pSUBF_cat: pEO_pEpRSUBF -> pEO_pEpR + pSUBF; kp_SUB*pEO_pEpRSUBF;
  vEO_OpR_pSUBF_cat: EO_OpRSUBF -> EO_OpR + pSUBF; kp_SUB*EO_OpRSUBF;
  vpEpKO_OpR_pSUBF_cat: pEpKO_OpRSUBF -> pEpKO_OpR + pSUBF; kp_SUB*pEpKO_OpRSUBF;
  vEpRSUBC_pSUBF_cat: EpRSUBCSUBF -> EpRSUBC + pSUBF; kp_SUB*EpRSUBCSUBF;
  vpEPO_OpR_pSUBF_cat: pEPO_OpRSUBF -> pEPO_OpR + pSUBF; kp_SUB*pEPO_OpRSUBF;
  vEpKO_OpR_pSUBF_cat: EpKO_OpRSUBF -> EpKO_OpR + pSUBF; kp_SUB*EpKO_OpRSUBF;
  vpEpRSUBC_pSUBF_cat: pEpRSUBCSUBF -> pEpRSUBC + pSUBF; kp_SUB*pEpRSUBCSUBF;
  vpR_pSUBF_cat: pRSUBF -> pR + pSUBF; kp_SUB*pRSUBF;
  vEpR_OpR_pSUBF_cat: EpR_OpRSUBF -> EpR_OpR + pSUBF; kp_SUB*EpR_OpRSUBF;
  vpEpRP2_pSUBF_cat: pEpRP2SUBF -> pEpRP2 + pSUBF; kp_SUB*pEpRP2SUBF;
  vpEO_pEpR_OpR_pSUBF_cat: pEO_pEpR_OpRSUBF -> pEO_pEpR_OpR + pSUBF; kp_SUB*pEO_pEpR_OpRSUBF;
  vEO_EpRSUBC_pSUBF_cat: EO_EpRSUBCSUBF -> EO_EpRSUBC + pSUBF; kp_SUB*EO_EpRSUBCSUBF;
  vEpR_pSUBF_cat: EpRSUBF -> EpR + pSUBF; kp_SUB*EpRSUBF;
  vpRP2_pSUBF_cat: pRP2SUBF -> pRP2 + pSUBF; kp_SUB*pRP2SUBF;
  vpEKO_OpR_pSUBF_cat: pEKO_OpRSUBF -> pEKO_OpR + pSUBF; kp_SUB*pEKO_OpRSUBF;
  vEO_EpRP2_pSUBF_cat: EO_EpRP2SUBF -> EO_EpRP2 + pSUBF; kp_SUB*EO_EpRP2SUBF;
  vpEpR_pSUBF_cat: pEpRSUBF -> pEpR + pSUBF; kp_SUB*pEpRSUBF;
  vpRSUBC_pSUBF_cat: pRSUBCSUBF -> pRSUBC + pSUBF; kp_SUB*pRSUBCSUBF;
  vEKO_OpR_pSUBF_cat: EKO_OpRSUBF -> EKO_OpR + pSUBF; kp_SUB*EKO_OpRSUBF;
  vEPO_OpR_pSUBF_cat: EPO_OpRSUBF -> EPO_OpR + pSUBF; kp_SUB*EPO_OpRSUBF;
  vEO_EpR_pSUBF_cat: EO_EpRSUBF -> EO_EpR + pSUBF; kp_SUB*EO_EpRSUBF;
  vEO_EpR_OpR_pSUBF_cat: EO_EpR_OpRSUBF -> EO_EpR_OpR + pSUBF; kp_SUB*EO_EpR_OpRSUBF;
  vpEpR_OpR_pSUBF_cat: pEpR_OpRSUBF -> pEpR_OpR + pSUBF; kp_SUB*pEpR_OpRSUBF;
  vEpRP2_pSUBF_cat: EpRP2SUBF -> EpRP2 + pSUBF; kp_SUB*EpRP2SUBF;
  vpEO_OpR_pSUBF_cat: pEO_OpRSUBF -> pEO_OpR + pSUBF; kp_SUB*pEO_OpRSUBF;
  vpEO_pEpRP2_pSUBF_cat: pEO_pEpRP2SUBF -> pEO_pEpRP2 + pSUBF; kp_SUB*pEO_pEpRP2SUBF;
  vSUBF_cat: pSUBF -> $SUBF; kdp_SUB*pSUBF;
end
