// SBML level 2 version 4

model model_invitro_incell()

  // Compartments:
  compartment unnamed = 1;

  // Species:
  species $E in unnamed;
  species $R in unnamed;
  species $O in unnamed;
  species ER in unnamed = 0;
  species EO in unnamed = 0;
  species OR in unnamed = 0;
  species pR in unnamed = 0;
  species EpR in unnamed = 0;
  species OpR in unnamed = 0;
  species pE in unnamed = 0;
  species pEO in unnamed = 0;
  species pER in unnamed = 0;
  species pEpR in unnamed = 0;
  species EO_OR in unnamed = 0;
  species EO_ER in unnamed = 0;
  species ER_OR in unnamed = 0;
  species EO_OpR in unnamed = 0;
  species EO_EpR in unnamed = 0;
  species EpR_OpR in unnamed = 0;
  species pEO_OR in unnamed = 0;
  species pEO_pER in unnamed = 0;
  species pER_OR in unnamed = 0;
  species pEO_OpR in unnamed = 0;
  species pEO_pEpR in unnamed = 0;
  species pEpR_OpR in unnamed = 0;
  species EO_ER_OR in unnamed = 0;
  species EO_EpR_OpR in unnamed = 0;
  species pEO_pER_OR in unnamed = 0;
  species pEO_pEpR_OpR in unnamed = 0;
  species $pK in unnamed;
  species K in unnamed = 0;
  species EpK in unnamed = 0;
  species EK in unnamed = 0; EK is "EpK";
  species pEpK in unnamed = 0;
  species pEK in unnamed = 0; pEK is "pEpK";
  species pEP in unnamed = 0;
  species EP in unnamed = 0;
  species $P in unnamed;
  species $P2 in unnamed;
  species pRP2 in unnamed = 0;
  species P2tot in unnamed = 1/unnamed;
  species Ptot in unnamed = 1/unnamed;
  species Ktot in unnamed = 1/unnamed;
  species Otot in unnamed = 1/unnamed;
  species Rtot in unnamed = 2/unnamed;
  species Etot in unnamed = 0.7/unnamed;
  species pRtot in unnamed;
  species pEtot in unnamed;
  species RP2 in unnamed = 0;
  species ERP2 in unnamed = 0;
  species pERP2 in unnamed = 0;
  species EO_ERP2 in unnamed = 0;
  species pEO_pERP2 in unnamed = 0;
  species EpRP2 in unnamed = 0;
  species pEpRP2 in unnamed = 0;
  species EO_EpRP2 in unnamed = 0;
  species pEO_pEpRP2 in unnamed = 0;
  species pEO_ER in unnamed = 0;
  species EPO in unnamed = 0;
  species pEPO in unnamed = 0;
  species EPO_OR in unnamed = 0;
  species pEPO_OR in unnamed = 0;
  species EPO_OpR in unnamed = 0;
  species pEPO_OpR in unnamed = 0;
  species EpKO in unnamed = 0;
  species pEpKO in unnamed = 0;
  species EpKO_OR in unnamed = 0;
  species pEpKO_OR in unnamed = 0;
  species EpKO_OpR in unnamed = 0;
  species pEpKO_OpR in unnamed = 0;
  species EKO in unnamed = 0;
  species pEKO in unnamed = 0;
  species EKO_OR in unnamed = 0;
  species pEKO_OR in unnamed = 0;
  species EKO_OpR in unnamed = 0;
  species pEKO_OpR in unnamed = 0;
  species ep_FSUB in unnamed;
  species rp_VFSUB in unnamed;

  // Parameters:
  kon_ER = 1;
  kon_ER_factor = 1;
  kon_OR = 1;
  kon_OR_factor = 1;
  kon_EO = 1;
  kon_EO_factor = 1;
  KD_ER = 1;
  KD_OR = 1;
  KD_OpR = 1;
  KD_pEO = 1;
  KD_EK = 1;
  KD_EP = 1;
  KD_RP2 = 1;
  pE_factor = 100;
  kp_R = 1;
  kp_R_on = 1;
  kon_EK = 1;
  kp_E = 1;
  kp_E_on = 1;
  kon_EP = 1;
  kdp_E = 1;
  kdp_E_on = 1;
  kon_RP2 = 1;
  kdp_R = 1;
  kp_K_bg = 1;
  kp_K_egf = 1;
  kp_K_on = 1;
  kdp_K = 1;
  a = 1;
  d = 1;
  Rtot_factor = 1;
  Otot_factor = 1;
  KD_EpR_factor = 5;

  // Assignment rules:
  KD_EO := KD_pEO*pE_factor;
  koff_EO := KD_EO*kon_EO;
  koff_EO_d := KD_EO*kon_EO*d;
  KD_EpR := KD_ER*KD_EpR_factor;
  koff_ER := KD_ER*kon_ER;
  koff_ER_d := KD_ER*kon_ER*d;
  koff_EpR := KD_EpR*kon_ER;
  koff_EpR_d := KD_EpR*kon_ER*d;
  koff_OR := KD_OR*kon_OR;
  koff_OR_d := KD_OR*kon_OR*d;
  koff_OpR := KD_OpR*kon_OR;
  koff_OpR_d := KD_OpR*kon_OR*d;
  koff_pEO := KD_pEO*kon_EO;
  koff_pEO_d := KD_pEO*kon_EO*d;
  koff_EK := KD_EK*kon_EK;
  koff_EP := KD_EP*kon_EP;
  koff_RP2 := KD_RP2*kon_RP2;
  P := Ptot - (EP + pEP + EPO_OR + EPO + pEPO + pEPO_OpR + EPO_OpR + pEPO_OR);
  P2 := P2tot - (pRP2 + pERP2 + EO_ERP2 + pEO_pEpRP2 + EpRP2 + RP2 + EO_EpRP2 + ERP2 + pEpRP2 + pEO_pERP2);
  pK := Ktot - (EpK + pEpK + K + EK + pEK + EKO + EKO_OpR + EpKO_OR + pEpKO + EpKO + pEpKO_OpR + pEKO_OR + pEpKO_OR + EKO_OR + EpKO_OpR + pEKO_OpR + pEKO);
  O := Otot*Otot_factor - (EO + pEO + OR + OpR + EO_OR + pEO_OR + pEO_OpR + EO_OpR + EO_ER + pEO_pER + EO_EpR + pEO_pEpR + ER_OR + pER_OR + EpR_OpR + pEpR_OpR + EO_ER_OR + EO_EpR_OpR + pEO_pER_OR + pEO_pEpR_OpR + EO_ERP2 + pEO_pEpRP2 + EO_EpRP2 + pEO_pERP2 + EPO_OR + EPO + pEPO + pEPO_OpR + EPO_OpR + pEPO_OR + EKO + EKO_OpR + EpKO_OR + pEpKO + EpKO + pEpKO_OpR + pEKO_OR + pEpKO_OR + EKO_OR + EpKO_OpR + pEKO_OpR + pEKO);
  R := Rtot*Rtot_factor - (pR + EpR + pEpR + ER + pER + OR + OpR + EO_OR + pEO_OR + pEO_OpR + EO_OpR + EO_ER + pEO_pER + EO_EpR + pEO_pEpR + ER_OR + pER_OR + EpR_OpR + pEpR_OpR + EO_ER_OR + EO_EpR_OpR + pEO_pER_OR + pEO_pEpR_OpR + pRP2 + pERP2 + EO_ERP2 + pEO_pEpRP2 + EpRP2 + RP2 + EO_EpRP2 + ERP2 + pEpRP2 + pEO_pERP2 + EPO_OR + pEPO_OpR + EPO_OpR + pEPO_OR + EKO_OpR + EpKO_OR + pEpKO_OpR + pEKO_OR + pEpKO_OR + EKO_OR + EpKO_OpR + pEKO_OpR);
  pRtot := pR + EpR + pEpR + OpR + pEO_OpR + EO_OpR + EO_EpR + pEO_pEpR + EpR_OpR + pEpR_OpR + EO_EpR_OpR + pEO_pEpR_OpR + pRP2 + pEO_pEpRP2 + EpRP2 + EO_EpRP2 + pEpRP2 + pEPO_OpR + EPO_OpR + EKO_OpR + pEpKO_OpR + EpKO_OpR + pEKO_OpR;
  pEtot := pE + pEpR + pER + pEO + pEO_OR + pEO_OpR + pEO_pER + pEO_pEpR + pER_OR + pEpR_OpR + pEO_pER_OR + pEO_pEpR_OpR + pEP + pEpK + pEK + pERP2 + pEO_pEpRP2 + pEpRP2 + pEO_pERP2 + pEPO + pEPO_OpR + pEPO_OR + pEpKO + pEpKO_OpR + pEKO_OR + pEpKO_OR + pEKO_OpR + pEKO;
  E := Etot - (pE + EpR + pEpR + ER + pER + EO + pEO + EO_OR + pEO_OR + pEO_OpR + EO_OpR + EO_ER + pEO_pER + EO_EpR + pEO_pEpR + ER_OR + pER_OR + EpR_OpR + pEpR_OpR + EO_ER_OR + EO_EpR_OpR + pEO_pER_OR + pEO_pEpR_OpR + EpK + pEpK + pEP + EP + EK + pEK + pERP2 + EO_ERP2 + pEO_pEpRP2 + EpRP2 + EO_EpRP2 + ERP2 + pEpRP2 + pEO_pERP2 + EPO_OR + EPO + pEPO + pEPO_OpR + EPO_OpR + pEPO_OR + EKO + EKO_OpR + EpKO_OR + pEpKO + EpKO + pEpKO_OpR + pEKO_OR + pEpKO_OR + EKO_OR + EpKO_OpR + pEKO_OpR + pEKO);
  kon_EO_a := a*kon_EO;
  kon_OR_a := a*kon_OR;
  kon_ER_a := a*kon_ER;
  ep_FSUB := pE + pER + pER_OR + pEpR_OpR;
  rp_VFSUB := pR + EpR + pEpR + EO_EpR + pEO_pEpR;

  // Reactions:
  ver: $E + $R -> ER; kon_ER_factor*kon_ER*E*R - koff_ER*ER;
  verp: $E + pR -> EpR; kon_ER_factor*kon_ER*E*pR - koff_EpR*EpR;
  vepr: pE + $R -> pER; kon_ER_factor*kon_ER*pE*R - koff_ER*pER;
  veprp: pE + pR -> pEpR; kon_ER_factor*kon_ER*pE*pR - koff_EpR*pEpR;
  veo_er_eo: EO + $R -> EO_ER; kon_ER_factor*kon_ER*EO*R - koff_ER*EO_ER;
  ver_or_or: $E + OR -> ER_OR; kon_ER_factor*kon_ER*E*OR - koff_ER*ER_OR;
  veo_erp_eo: EO + pR -> EO_EpR; kon_ER_factor*kon_ER*EO*pR - koff_EpR*EO_EpR;
  verp_orp_orp: $E + OpR -> EpR_OpR; kon_ER_factor*kon_ER*E*OpR - koff_EpR*EpR_OpR;
  vepo_epr_epo: pEO + $R -> pEO_pER; kon_ER_factor*kon_ER*pEO*R - koff_ER*pEO_pER;
  vepr_or_or: pE + OR -> pER_OR; kon_ER_factor*kon_ER*pE*OR - koff_ER*pER_OR;
  veprp_orp_orp: pE + OpR -> pEpR_OpR; kon_ER_factor*kon_ER*pE*OpR - koff_EpR*pEpR_OpR;
  vepo_eprp_epo: pEO + pR -> pEO_pEpR; kon_ER_factor*kon_ER*pEO*pR - koff_EpR*pEO_pEpR;
  veo_er_or_eoor: EO_OR -> EO_ER_OR; kon_ER_factor*kon_ER_a*EO_OR - koff_ER_d*EO_ER_OR;
  veo_ero_orp_eoorp: EO_OpR -> EO_EpR_OpR; kon_ER_factor*kon_ER_a*EO_OpR - koff_EpR_d*EO_EpR_OpR;
  vepo_epr_or_epoor: pEO_OR -> pEO_pER_OR; kon_ER_factor*kon_ER_a*pEO_OR - koff_ER_d*pEO_pER_OR;
  vepo_eprp_orp_epoorp: pEO_OpR -> pEO_pEpR_OpR; kon_ER_factor*kon_ER_a*pEO_OpR - koff_EpR_d*pEO_pEpR_OpR;
  veo: $E + $O -> EO; kon_EO_factor*kon_EO*E*O - koff_EO*EO;
  vepo: pE + $O -> pEO; kon_EO_factor*kon_EO*pE*O - koff_pEO*pEO;
  veo_or_or: $E + OR -> EO_OR; kon_EO_factor*kon_EO*E*OR - koff_EO*EO_OR;
  veo_er_er: ER + $O -> EO_ER; kon_EO_factor*kon_EO*ER*O - koff_EO*EO_ER;
  veo_orp_orp: $E + OpR -> EO_OpR; kon_EO_factor*kon_EO*E*OpR - koff_EO*EO_OpR;
  vepo_or_or: pE + OR -> pEO_OR; kon_EO_factor*kon_EO*pE*OR - koff_pEO*pEO_OR;
  veo_erp_erp: EpR + $O -> EO_EpR; kon_EO_factor*kon_EO*EpR*O - koff_EO*EO_EpR;
  epo_epr_epr: pER + $O -> pEO_pER; kon_EO_factor*kon_EO*pER*O - koff_pEO*pEO_pER;
  vepo_orp_orp: pE + OpR -> pEO_OpR; kon_EO_factor*kon_EO*pE*OpR - koff_pEO*pEO_OpR;
  vepo_eprp_eprp: pEpR + $O -> pEO_pEpR; kon_EO_factor*kon_EO*pEpR*O - koff_pEO*pEO_pEpR;
  veo_er_or_eror: ER_OR -> EO_ER_OR; kon_EO_a*ER_OR - koff_EO_d*EO_ER_OR;
  veo_erp_orp_erporp: EpR_OpR -> EO_EpR_OpR; kon_EO_a*EpR_OpR - koff_EO_d*EO_EpR_OpR;
  vepo_epr_or_epror: pER_OR -> pEO_pER_OR; kon_EO_a*pER_OR - koff_pEO_d*pEO_pER_OR;
  vepo_eprp_orp_eprporp: pEpR_OpR -> pEO_pEpR_OpR; kon_EO_a*pEpR_OpR - koff_pEO_d*pEO_pEpR_OpR;
  vor: $O + $R -> OR; kon_OR_factor*kon_OR*O*R - koff_OR*OR;
  vorp: $O + pR -> OpR; kon_OR_factor*kon_OR*O*pR - koff_OpR*OpR;
  veo_or_eo: EO + $R -> EO_OR; kon_OR_factor*kon_OR*EO*R - koff_OR*EO_OR;
  ver_or_er: $O + ER -> ER_OR; kon_OR_factor*kon_OR*O*ER - koff_OR*ER_OR;
  veo_orp_eo: EO + pR -> EO_OpR; kon_OR_factor*kon_OR*EO*pR - koff_OpR*EO_OpR;
  verp_orp_erp: $O + EpR -> EpR_OpR; kon_OR_factor*kon_OR*O*EpR - koff_OpR*EpR_OpR;
  vepo_or_epo: pEO + $R -> pEO_OR; kon_OR_factor*kon_OR*pEO*R - koff_OR*pEO_OR;
  vepr_or_epr: $O + pER -> pER_OR; kon_OR_factor*kon_OR*O*pER - koff_OR*pER_OR;
  vepo_orp_epo: pEO + pR -> pEO_OpR; kon_OR_factor*kon_OR*pEO*pR - koff_OpR*pEO_OpR;
  veprp_orp_eprp: $O + pEpR -> pEpR_OpR; kon_OR_factor*kon_OR*O*pEpR - koff_OpR*pEpR_OpR;
  veo_er_or_eoer: EO_ER -> EO_ER_OR; kon_OR_factor*kon_OR_a*EO_ER - koff_OR_d*EO_ER_OR;
  veo_erp_orp_eoerp: EO_EpR -> EO_EpR_OpR; kon_OR_factor*kon_OR_a*EO_EpR - koff_OpR_d*EO_EpR_OpR;
  vepo_epr_or_epoepr: pEO_pER -> pEO_pER_OR; kon_OR_factor*kon_OR_a*pEO_pER - koff_OR_d*pEO_pER_OR;
  vepo_eprp_orp_epoeprp: pEO_pEpR -> pEO_pEpR_OpR; kon_OR_factor*kon_OR_a*pEO_pEpR - koff_OpR_d*pEO_pEpR_OpR;
  veprp_orp_epror: pER_OR => OpR + pE; kp_R_on*kp_R*pER_OR;
  veprp_epr: pER => pR + pE; kp_R_on*kp_R*pER;
  vekin_inact: $E + K -> EK; kon_EK*E*K - koff_EK*EK;
  vepkin_inact: pE + K -> pEK; kon_EK*pE*K - koff_EK*pEK;
  vkin_act: K -> $pK; (kp_K_bg + kp_K_egf*kp_K_on)*K - kdp_K*pK;
  vekin: $E + $pK -> EpK; kon_EK*E*pK - koff_EK*EpK;
  vepkin: pE + $pK -> pEpK; kon_EK*pE*pK - koff_EK*pEpK;
  vep_ekin: EpK => pE + $pK; kp_E_on*kp_E*EpK;
  vepp: $E + $P -> EP; kon_EP*E*P - koff_EP*EP;
  veppp: pE + $P -> pEP; kon_EP*pE*P - koff_EP*pEP;
  ve_eppp: pEP => $E + $P; kdp_E_on*kdp_E*pEP;
  vrpPP2: pR + $P2 -> pRP2; kon_RP2*pR*P2 - koff_RP2*pRP2;
  vr_rpPP2: pRP2 => $R + $P2; kdp_R*pRP2;
  vr_PP2: $R + $P2 -> RP2; kon_RP2*R*P2 - koff_RP2*RP2;
  ver_PP2: ER + $P2 -> ERP2; kon_RP2*ER*P2 - koff_RP2*ERP2;
  ve_rPP2: $E + RP2 -> ERP2; kon_ER*E*RP2 - koff_ER*ERP2;
  vepr_PP2: pER + $P2 -> pERP2; kon_RP2*pER*P2 - koff_RP2*pERP2;
  vep_rPP2: pE + RP2 -> pERP2; kon_ER*pE*RP2 - koff_ER*pERP2;
  veo_er_PP2: EO_ER + $P2 -> EO_ERP2; kon_RP2*EO_ER*P2 - koff_RP2*EO_ERP2;
  veo_rPP2: EO + RP2 -> EO_ERP2; kon_ER*EO*RP2 - koff_ER*EO_ERP2;
  verPP2_o: ERP2 + $O -> EO_ERP2; kon_EO*ERP2*O - koff_EO*EO_ERP2;
  vepo_epr_PP2: pEO_pER + $P2 -> pEO_pERP2; kon_RP2*pEO_pER*P2 - koff_RP2*pEO_pERP2;
  vepo_rPP2: pEO + RP2 -> pEO_pERP2; kon_ER*pEO*RP2 - koff_ER*pEO_pERP2;
  veprPP2_o: pERP2 + $O -> pEO_pERP2; kon_EO*pERP2*O - koff_pEO*pEO_pERP2;
  verp_PP2: EpR + $P2 -> EpRP2; kon_RP2*EpR*P2 - koff_RP2*EpRP2;
  ve_rpPP2: $E + pRP2 -> EpRP2; kon_ER*E*pRP2 - koff_EpR*EpRP2;
  veprp_PP2: pEpR + $P2 -> pEpRP2; kon_RP2*pEpR*P2 - koff_RP2*pEpRP2;
  vep_rpPP2: pE + pRP2 -> pEpRP2; kon_ER*pE*pRP2 - koff_EpR*pEpRP2;
  veo_erp_PP2: EO_EpR + $P2 -> EO_EpRP2; kon_RP2*EO_EpR*P2 - koff_RP2*EO_EpRP2;
  veo_rpPP2: EO + pRP2 -> EO_EpRP2; kon_ER*EO*pRP2 - koff_EpR*EO_EpRP2;
  verpPP2_o: EpRP2 + $O -> EO_EpRP2; kon_EO*EpRP2*O - koff_EO*EO_EpRP2;
  vepo_eprp_PP2: pEO_pEpR + $P2 -> pEO_pEpRP2; kon_RP2*pEO_pEpR*P2 - koff_RP2*pEO_pEpRP2;
  vepo_rpPP2: pEO + pRP2 -> pEO_pEpRP2; kon_ER*pEO*pRP2 - koff_EpR*pEO_pEpRP2;
  veprpPP2_o: pEpRP2 + $O -> pEO_pEpRP2; kon_EO*pEpRP2*O - koff_pEO*pEO_pEpRP2;
  ver_PP2_cat: EpRP2 -> ER + $P2; kdp_R*EpRP2;
  vepr_PP2_cat: pEpRP2 -> pER + $P2; kdp_R*pEpRP2;
  veo_er_PP2_cat: EO_EpRP2 -> EO_ER + $P2; kdp_R*EO_EpRP2;
  vepo_er_PP2_cat: pEO_pEpRP2 -> pEO_ER + $P2; kdp_R*pEO_pEpRP2;
  veo_PP: EO + $P -> EPO; kon_EP*EO*P - koff_EP*EPO;
  vePP_o: EP + $O -> EPO; kon_EO*EP*O - koff_EO*EPO;
  vepo_PP: pEO + $P -> pEPO; kon_EP*pEO*P - koff_EP*pEPO;
  vepPP_o: pEP + $O -> pEPO; kon_EO*pEP*O - koff_pEO*pEPO;
  veo_or_PP: EO_OR + $P -> EPO_OR; kon_EP*EO_OR*P - koff_EP*EPO_OR;
  vePP_OR: EP + OR -> EPO_OR; kon_EO*EP*OR - koff_EO*EPO_OR;
  veoPP_r: EPO + $R -> EPO_OR; kon_OR*EPO*R - koff_OR*EPO_OR;
  vepo_or_PP: pEO_OR + $P -> pEPO_OR; kon_EP*pEO_OR*P - koff_EP*pEPO_OR;
  vepPP_OR: pEP + OR -> pEPO_OR; kon_EO*pEP*OR - koff_pEO*pEPO_OR;
  vepoPP_r: pEPO + $R -> pEPO_OR; kon_OR*pEPO*R - koff_OR*pEPO_OR;
  veo_orp_PP: EO_OpR + $P -> EPO_OpR; kon_EP*EO_OpR*P - koff_EP*EPO_OpR;
  vePP_orp: EP + OpR -> EPO_OpR; kon_EO*EP*OpR - koff_EO*EPO_OpR;
  veoPP_rp: EPO + pR -> EPO_OpR; kon_OR*EPO*pR - koff_OpR*EPO_OpR;
  vepo_orp_PP: pEO_OpR + $P -> pEPO_OpR; kon_EP*pEO_OpR*P - koff_EP*pEPO_OpR;
  vepPP_orp: pEP + OpR -> pEPO_OpR; kon_EO*pEP*OpR - koff_pEO*pEPO_OpR;
  vepoPP_rp: pEPO + pR -> pEPO_OpR; kon_OR*pEPO*pR - koff_OpR*pEPO_OpR;
  veo_kin: EO + $pK -> EpKO; kon_EK*EO*pK - koff_EK*EpKO;
  vekin_o: EpK + $O -> EpKO; kon_EO*EpK*O - koff_EO*EpKO;
  vepo_kin: pEO + $pK -> pEpKO; kon_EK*pEO*pK - koff_EK*pEpKO;
  vepkin_o: pEpK + $O -> pEpKO; kon_EO*pEpK*O - koff_pEO*pEpKO;
  veo_or_kin: EO_OR + $pK -> EpKO_OR; kon_EK*EO_OR*pK - koff_EK*EpKO_OR;
  vekin_OR: EpK + OR -> EpKO_OR; kon_EO*EpK*OR - koff_EO*EpKO_OR;
  veokin_r: EpKO + $R -> EpKO_OR; kon_OR*EpKO*R - koff_OR*EpKO_OR;
  vepo_or_kin: pEO_OR + $pK -> pEpKO_OR; kon_EK*pEO_OR*pK - koff_EK*pEpKO_OR;
  vepkin_OR: pEpK + OR -> pEpKO_OR; kon_EO*pEpK*OR - koff_pEO*pEpKO_OR;
  vepokin_r: pEpKO + $R -> pEpKO_OR; kon_OR*pEpKO*R - koff_OR*pEpKO_OR;
  veo_orp_kin: EO_OpR + $pK -> EpKO_OpR; kon_EK*EO_OpR*pK - koff_EK*EpKO_OpR;
  vekin_orp: EpK + OpR -> EpKO_OpR; kon_EO*EpK*OpR - koff_EO*EpKO_OpR;
  veokin_rp: EpKO + pR -> EpKO_OpR; kon_OR*EpKO*pR - koff_OpR*EpKO_OpR;
  vepo_orp_kin: pEO_OpR + $pK -> pEpKO_OpR; kon_EK*pEO_OpR*pK - koff_EK*pEpKO_OpR;
  vepkin_orp: pEpK + OpR -> pEpKO_OpR; kon_EO*pEpK*OpR - koff_pEO*pEpKO_OpR;
  vepokin_rp: pEpKO + pR -> pEpKO_OpR; kon_OR*pEpKO*pR - koff_OpR*pEpKO_OpR;
  veo_kin_inact: EO + K -> EKO; kon_EK*EO*K - koff_EK*EKO;
  vekin_inact_o: EK + $O -> EKO; kon_EO*EK*O - koff_EO*EKO;
  vepo_kin_inact: pEO + K -> pEKO; kon_EK*pEO*K - koff_EK*pEKO;
  vepkin_inact_o: pEK + $O -> pEKO; kon_EO*pEK*O - koff_pEO*pEKO;
  veo_or_kin_inact: EO_OR + K -> EKO_OR; kon_EK*EO_OR*K - koff_EK*EKO_OR;
  vekin_inact_OR: EK + OR -> EKO_OR; kon_EO*EK*OR - koff_EO*EKO_OR;
  veokin_inact_r: EKO + $R -> EKO_OR; kon_OR*EKO*R - koff_OR*EKO_OR;
  vepo_or_kin_inact: pEO_OR + K -> pEKO_OR; kon_EK*pEO_OR*K - koff_EK*pEKO_OR;
  vepkin_inact_OR: pEK + OR -> pEKO_OR; kon_EO*pEK*OR - koff_pEO*pEKO_OR;
  vepokin_inact_r: pEKO + $R -> pEKO_OR; kon_OR*pEKO*R - koff_OR*pEKO_OR;
  veo_orp_kin_inact: EO_OpR + K -> EKO_OpR; kon_EK*EO_OpR*K - koff_EK*EKO_OpR;
  vekin_inact_orp: EK + OpR -> EKO_OpR; kon_EO*EK*OpR - koff_EO*EKO_OpR;
  veokin_inact_rp: EKO + pR -> EKO_OpR; kon_OR*EKO*pR - koff_OpR*EKO_OpR;
  vepo_orp_kin_inact: pEO_OpR + K -> pEKO_OpR; kon_EK*pEO_OpR*K - koff_EK*pEKO_OpR;
  vepkin_inact_orp: pEK + OpR -> pEKO_OpR; kon_EO*pEK*OpR - koff_pEO*pEKO_OpR;
  vepokin_inact_rp: pEKO + pR -> pEKO_OpR; kon_OR*pEKO*pR - koff_OpR*pEKO_OpR;
end
